*Heading
** Job name: H1_75 Model name: EmbroideryLattice
** Generated by: Abaqus/CAE 2022
*Preprint, echo=NO, model=NO, history=NO, contact=NO
**
** PARTS
**
*Part, name=PART-1
*Node
      1,           0.,        -185.,           0.
      2,          0.5,        -185.,           0.
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*Element, type=S4R
   1,    1,    2,   53,   52
   2,    2,    3,   54,   53
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*Elset, elset=GAP
    6,   12,   18,   24,   30,   36
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*Elset, elset=PREPREG
    1,    2,    3,    4,    5,    7
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*Elset, elset=ALL, generate
    1,  8400,     1
*Orientation, name=Ori-1
          1.,           0.,           0.,           0.,           1.,           0.
3, 0.
** Section: Section-1-ALL
*Shell Section, elset=ALL, material=H1, orientation=Ori-1
0.53, 5
*Transverse Shear Stiffness
5600., 5600., 4200.
*End Part
**
**
** ASSEMBLY
**
*Assembly, name=Assembly
**
*Instance, name=PART-1-1, part=PART-1
*End Instance
**
*Elset, elset=SET-1, instance=PART-1-1, generate
    1,  8400,     1
*Nset, nset=SET-2, instance=PART-1-1, generate
    1,  2091,     1
*Nset, nset=edge, instance=PART-1-1, generate
     1,  14179,     51
*Nset, nset=_PickedSet6, internal, instance=PART-1-1, generate
     1,  14229,      1
*End Assembly
**
** MATERIALS
**
*Material, name=GAP
*Density
 1.33e-09,
*Depvar
     40,
*User Defined Field
*User Material, constants=20
 21217.8,        1000.,          0.1, -2.30462e+06,  2.01194e+06,     -708418.,      128656.,     -12809.7
       696.12,          85.,          0.5,        7500.,          0.2,        3800.,         0.39,        0.004
      17296.1,         625.,          0.1,        0.004
*Material, name=H1
*Density
 2.37e-09,
*Depvar
     40,
*User Defined Field
*User Material, constants=20
 46.11,       75.,       0.1,  0.051257, -0.231135,  0.357398, -0.246286,  0.112673
  0.044317,    31.513,       0.5,        5.,       0.2,     3800.,      0.39,     0.006
     46.11,       75.,       0.1,     0.006
** ----------------------------------------------------------------
**
** STEP: Step-1
**
*Step, name=Step-1, nlgeom=YES
*Dynamic, Explicit
, 0.5,, 1e-07
*Bulk Viscosity
0.06, 1.2
**
** BOUNDARY CONDITIONS
**
** Name: Disp-BC-1 Type: Displacement/Rotation
*Boundary
SET-2, 1, 1
** Name: Disp-BC-2 Type: Displacement/Rotation
*Boundary
SET-2, 2, 2
** Name: Disp-BC-3 Type: Displacement/Rotation
*Boundary
SET-2, 3, 3
** Name: Disp-BC-4 Type: Displacement/Rotation
*Boundary
SET-2, 4, 4
** Name: Disp-BC-5 Type: Displacement/Rotation
*Boundary
SET-2, 5, 5
** Name: Disp-BC-6 Type: Displacement/Rotation
*Boundary
SET-2, 6, 6
**
** LOADS
**
** Name: GRAVITY-1   Type: Gravity
*Dload
SET-1, GRAV, 9800., 0., 0., -1.
**
** OUTPUT REQUESTS
**
*Restart, write, number interval=1, time marks=NO
**
** FIELD OUTPUT: edge
**
*Output, field, time interval=0.1
*Node Output, nset=edge
COORD,
**
** FIELD OUTPUT: F-Output-1
**
*Output, field, number interval=100
*Node Output
A, COORD, RF, U, V
*Element Output, directions=YES
EVF, LE, PE, PEEQ, PEEQVAVG, PEVAVG, S, SVAVG
*Contact Output
CSTRESS,
**
** HISTORY OUTPUT: H-Output-1
**
*Output, history, variable=PRESELECT
*End Step
