*Heading
** Job name: BiasH2-85 Model name: EmbroideryBiasExtensionH2
** Generated by: Abaqus/CAE 2022
*Preprint, echo=NO, model=NO, history=NO, contact=NO
**
** PARTS
**
*Part, name=BiasExtension
*End Part
**
**
** ASSEMBLY
**
*Assembly, name=Assembly
**
*Instance, name=BiasExtension-1, part=BiasExtension
*Node
      1,   25.4099998,   25.4099998,           0.
      2,   12.7049999,   38.1150017,           0.
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*Element, type=S4R
   1,    1,    9,  589,  148
   2,    9,   10,  590,  589
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*Element, type=S3R
1297, 2237, 2205, 2202
1298, 2303, 1903, 2265
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*Nset, nset=all, generate
    1,  6058,     1
*Elset, elset=all, generate
    1,  5978,     1
*Orientation, name=Ori-1
1., 0., 0., 0., 1., 0.
3, 45.
** Section: Section-1-ALL
*Shell Section, elset=all, material=H1, orientation=Ori-1
0.53, 5
*Transverse Shear Stiffness
5600., 5600., 4200.
*End Instance
**
*Nset, nset=BottomFix, instance=BiasExtension-1
   5,   6, 219, 220, 221, 222
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*Elset, elset=BottomFix, instance=BiasExtension-1
 1299, 1330, 1331, 1338, 1339, 1344
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*Nset, nset=angle, instance=BiasExtension-1
  538,  539, 2405
*Nset, nset=topMove, instance=BiasExtension-1
   7,   8, 339, 340, 341, 342
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*Elset, elset=topMove, instance=BiasExtension-1
 2072, 2096, 2098, 2105, 2106, 2113
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*End Assembly
*Amplitude, name=Amp-1
             0.,              0.,              1.,              1.
**
** MATERIALS
**
*Material, name=GAP
*Density
 1.33e-09,
*Depvar
     40,
*User Defined Field
*User Material, constants=20
 21217.8,        1000.,          0.1, -2.30462e+06,  2.01194e+06,     -708418.,      128656.,     -12809.7
       696.12,          85.,          0.5,        7500.,          0.2,        3800.,         0.39,        0.004
      17296.1,         625.,          0.1,        0.004
*Material, name=H1
*Density
 4.21e-09,
*Depvar
     40,
*User Defined Field
*User Material, constants=20
 43.88,     100.,      0.1, -3.93015,  17.3597, -27.3318,  16.0981, -1.38771
   3.4378,      85.,      0.5,       5.,      0.2,    3800.,     0.39,    0.006
    43.88,     100.,      0.1,    0.006
** ----------------------------------------------------------------
**
** STEP: Step-1
**
*Step, name=Step-1, nlgeom=YES
*Dynamic, Explicit
, 1.
*Bulk Viscosity
0.06, 1.2
**
** BOUNDARY CONDITIONS
**
** Name: BC-1 Type: Symmetry/Antisymmetry/Encastre
*Boundary
BottomFix, ENCASTRE
** Name: BC-2 Type: Displacement/Rotation
*Boundary, amplitude=Amp-1
topMove, 1, 1
topMove, 2, 2, 20.
topMove, 3, 3
topMove, 4, 4
topMove, 5, 5
topMove, 6, 6
**
** OUTPUT REQUESTS
**
*Restart, write, number interval=1, time marks=NO
**
** FIELD OUTPUT: F-Output-1
**
*Output, field, number interval=100
*Node Output
A, COORD, RF, U, V
*Element Output, directions=YES
EVF, LE, PE, PEEQ, PEEQVAVG, PEVAVG, S, SDV, SVAVG
*Contact Output
CSTRESS,
**
** HISTORY OUTPUT: H-Output-1
**
*Output, history, variable=PRESELECT
*End Step
